f(x) := 6.497413*10^13*x^5 - 72106.427618*x + 5434.970295*sqrt(x) - 123.315327514
f(0.004026688) = -2.572e-5
r := root(f(x), x, 0.003, 0.005)
r = 0.00402669
f(r) = 1.67447e-6
t := 0, 0.00005 .. 0.005
# [plot: f(t) vs t]
TOL := 10^-4
a := root(f(x), x, 0.003, 0.005)
a = 0.00402669
f(a) = 1.67447e-6
TOL := 10^-8
b := root(f(x), x, 0.003, 0.005)
b = 0.00402669
f(b) = -1.42109e-14
# Символьное преобразование
g(y) := 6.497413*10^13*y^10 - 72106.427618*y^2 + 5434.970295*y - 123.315327514
c := root(g(y), y, 0.054, 0.071)
c = 0.0634562
d := c^2
d = 0.00402669
f(d) = -1.42109e-14
# При замене y = √x и x = y² исходное уравнение f(x) = 0
# преобразуется в полиномиальное уравнение g(y) = 0 десятой
# степени. Корень преобразованного уравнения найден численно
# функцией root. После обратной замены x = y² получено значение
# корня исходного уравнения.
# Сравнение точности
#
# При TOL = 10⁻⁴ получена невязка |f(a)| = 1,674·10⁻⁶.
# При TOL = 10⁻⁸ получена невязка |f(b)| = 1,421·10⁻¹⁴.
# Итоговый корень: x = 0,004026688458 мг/л.
